// SBML level 3 version 2

model biocrnpyler_553971()
  // model units - substance: mole, time: second, volume: litre, area: square_metre, length: metre, extent: mole

  // Compartments:
  compartment default = 1e-6;

  // Species:
  species dna_g in default = 0;
  species tetR in default = 0;
  species rna_g in default = 0;
  species VirE2_f in default = 0;
  species ATP in default = 0;
  species ADP in default = 0;
  species atc_i in default = 0;
  species complex_atc_i_tetR in default = 0;
  species VirE2_b in default = 0;
  species complex_dna_g_tetR in default = 0;
  species complex_atc_i_dna_g_tetR in default = 0;
  species P in default = 0;

  // Reactions:
  r0: atc_i + tetR => complex_atc_i_tetR; r0_k*atc_i*tetR;
    r0_k = 0.0002;
  r0_1: complex_atc_i_tetR => atc_i + tetR; r0_1_k*complex_atc_i_tetR;
    r0_1_k = 2e-9;
  r2: dna_g + tetR => complex_dna_g_tetR; r2_k*dna_g*tetR;
    r2_k = 4e-5;
  r2_1: complex_dna_g_tetR => dna_g + tetR; r2_1_k*complex_dna_g_tetR;
    r2_1_k = 1e-12;
  r4: complex_dna_g_tetR + atc_i => complex_atc_i_dna_g_tetR; r4_k*complex_dna_g_tetR*atc_i;
    r4_k = 6e-6;
  r4_1: complex_atc_i_dna_g_tetR => complex_dna_g_tetR + atc_i; r4_1_k*complex_atc_i_dna_g_tetR;
    r4_1_k = 3e-9;
  r6: complex_atc_i_dna_g_tetR => dna_g + complex_atc_i_tetR; r6_k*complex_atc_i_dna_g_tetR;
    r6_k = 0.005;
  r6_1: dna_g + complex_atc_i_tetR => complex_atc_i_dna_g_tetR; r6_1_k*dna_g*complex_atc_i_tetR;
    r6_1_k = 1e-10;
  r8: dna_g => dna_g + rna_g; r8_k*dna_g;
    r8_k = 0.0031875;
  r9: rna_g + ATP => rna_g + ADP + VirE2_f + P; r9_k*rna_g*ATP^n/(ATP^n + K);
    r9_k = 0.001; n = 1; K = 1;
  r10: VirE2_f => VirE2_b; r10_k*VirE2_f;
    r10_k = 0.001;
  r10_1: VirE2_b => VirE2_f; r10_1_k*VirE2_b;
    r10_1_k = 1e-10;
  r12: rna_g => ; r12_k*rna_g;
    r12_k = 0.001;
  r13: VirE2_f => ; r13_k*VirE2_f;
    r13_k = 1e-5;

  // Unit definitions:
  unit square_metre = metre^2;
end
