// SBML level 3 version 2

model combined_model_of__combined_model_of__external_reservoir_model_combined_model_of__atc_membrane3_combined_model_of__biocrnpyler_392656()
  // model units - substance: mole, time: second, volume: litre, area: square_metre, length: metre, extent: mole

  // Compartments:
  compartment cell_external = 0.0001 litre;
  compartment cell_3_internal_combined = 1e-6 litre;

  // Species:
  species atc_e_external_reservoir_model_1_combined in cell_external = 10000;
  species atc_i_cell3 in cell_3_internal_combined = 0;
  species ssDNA_comp2 in cell_3_internal_combined = 10;
  species enzyme_VioC_biocrnpyler_392656 in cell_3_internal_combined = 0;
  species protein_RNAP_biocrnpyler_392656 in cell_3_internal_combined = 3;
  species protein_RNAase_biocrnpyler_392656 in cell_3_internal_combined = 6;
  species transcript_vioC_biocrnpyler_392656 in cell_3_internal_combined = 0;
  species protein_Ribo_biocrnpyler_392656 in cell_3_internal_combined = 24;
  species complex_protein_RNAase_transcript_vioC_biocrnpyler_392656 in cell_3_internal_combined = 0;
  species complex_protein_Ribo_transcript_vioC_biocrnpyler_392656 in cell_3_internal_combined = 0;
  species complex_dna_dna_vioC_protein_RNAP_biocrnpyler_392656 in cell_3_internal_combined = 0;
  species dna_dna_vioC_biocrnpyler_392656 in cell_3_internal_combined = 10;
  species PTVA_biocrnpyler_392656 in cell_3_internal_combined = 0;
  species V_biocrnpyler_392656 in cell_3_internal_combined = 0;
  species complex_PTVA_enzyme_VioC_biocrnpyler_392656 in cell_3_internal_combined = 0;
  species PTDVA_biocrnpyler_392656 in cell_3_internal_combined = 0;
  species DV_biocrnpyler_392656 in cell_3_internal_combined = 0;
  species complex_PTDVA_enzyme_VioC_biocrnpyler_392656 in cell_3_internal_combined = 0;

  // Parameters:
  kb = 0.002 per_second;
  kd = 1e-5 per_second;

  // Reactions:
  r1_cell3: atc_e_external_reservoir_model_1_combined -> atc_i_cell3; kb*atc_e_external_reservoir_model_1_combined - kd*atc_i_cell3;
  r0_biocrnpyler_392656: dna_dna_vioC_biocrnpyler_392656 + protein_RNAP_biocrnpyler_392656 => complex_dna_dna_vioC_protein_RNAP_biocrnpyler_392656; r0_biocrnpyler_392656_k*dna_dna_vioC_biocrnpyler_392656*protein_RNAP_biocrnpyler_392656;
    r0_biocrnpyler_392656_k = 100;
  r0_1_biocrnpyler_392656: complex_dna_dna_vioC_protein_RNAP_biocrnpyler_392656 => dna_dna_vioC_biocrnpyler_392656 + protein_RNAP_biocrnpyler_392656; r0_1_biocrnpyler_392656_k*complex_dna_dna_vioC_protein_RNAP_biocrnpyler_392656;
    r0_1_biocrnpyler_392656_k = 10;
  r2_biocrnpyler_392656: complex_dna_dna_vioC_protein_RNAP_biocrnpyler_392656 => dna_dna_vioC_biocrnpyler_392656 + transcript_vioC_biocrnpyler_392656 + protein_RNAP_biocrnpyler_392656; r2_biocrnpyler_392656_k*complex_dna_dna_vioC_protein_RNAP_biocrnpyler_392656;
    r2_biocrnpyler_392656_k = 0.05;
  r3_biocrnpyler_392656: transcript_vioC_biocrnpyler_392656 + protein_Ribo_biocrnpyler_392656 => complex_protein_Ribo_transcript_vioC_biocrnpyler_392656; r3_biocrnpyler_392656_k*transcript_vioC_biocrnpyler_392656*protein_Ribo_biocrnpyler_392656;
    r3_biocrnpyler_392656_k = 100;
  r3_1_biocrnpyler_392656: complex_protein_Ribo_transcript_vioC_biocrnpyler_392656 => transcript_vioC_biocrnpyler_392656 + protein_Ribo_biocrnpyler_392656; r3_1_biocrnpyler_392656_k*complex_protein_Ribo_transcript_vioC_biocrnpyler_392656;
    r3_1_biocrnpyler_392656_k = 10;
  r5_biocrnpyler_392656: complex_protein_Ribo_transcript_vioC_biocrnpyler_392656 => transcript_vioC_biocrnpyler_392656 + enzyme_VioC_biocrnpyler_392656 + protein_Ribo_biocrnpyler_392656; r5_biocrnpyler_392656_k*complex_protein_Ribo_transcript_vioC_biocrnpyler_392656;
    r5_biocrnpyler_392656_k = 0.05;
  r6_biocrnpyler_392656: transcript_vioC_biocrnpyler_392656 + protein_RNAase_biocrnpyler_392656 => complex_protein_RNAase_transcript_vioC_biocrnpyler_392656; r6_biocrnpyler_392656_k*transcript_vioC_biocrnpyler_392656*protein_RNAase_biocrnpyler_392656;
    r6_biocrnpyler_392656_k = 100;
  r6_1_biocrnpyler_392656: complex_protein_RNAase_transcript_vioC_biocrnpyler_392656 => transcript_vioC_biocrnpyler_392656 + protein_RNAase_biocrnpyler_392656; r6_1_biocrnpyler_392656_k*complex_protein_RNAase_transcript_vioC_biocrnpyler_392656;
    r6_1_biocrnpyler_392656_k = 10;
  r8_biocrnpyler_392656: complex_protein_RNAase_transcript_vioC_biocrnpyler_392656 => protein_RNAase_biocrnpyler_392656; r8_biocrnpyler_392656_k*complex_protein_RNAase_transcript_vioC_biocrnpyler_392656;
    r8_biocrnpyler_392656_k = 0.001;
  r9_biocrnpyler_392656: PTVA_biocrnpyler_392656 + enzyme_VioC_biocrnpyler_392656 => complex_PTVA_enzyme_VioC_biocrnpyler_392656; r9_biocrnpyler_392656_k*PTVA_biocrnpyler_392656*enzyme_VioC_biocrnpyler_392656;
    r9_biocrnpyler_392656_k = 100;
  r9_1_biocrnpyler_392656: complex_PTVA_enzyme_VioC_biocrnpyler_392656 => PTVA_biocrnpyler_392656 + enzyme_VioC_biocrnpyler_392656; r9_1_biocrnpyler_392656_k*complex_PTVA_enzyme_VioC_biocrnpyler_392656;
    r9_1_biocrnpyler_392656_k = 10;
  r11_biocrnpyler_392656: complex_PTVA_enzyme_VioC_biocrnpyler_392656 => V_biocrnpyler_392656 + enzyme_VioC_biocrnpyler_392656; r11_biocrnpyler_392656_k*complex_PTVA_enzyme_VioC_biocrnpyler_392656;
    r11_biocrnpyler_392656_k = 100;
  r12_biocrnpyler_392656: PTDVA_biocrnpyler_392656 + enzyme_VioC_biocrnpyler_392656 => complex_PTDVA_enzyme_VioC_biocrnpyler_392656; r12_biocrnpyler_392656_k*PTDVA_biocrnpyler_392656*enzyme_VioC_biocrnpyler_392656;
    r12_biocrnpyler_392656_k = 100;
  r12_1_biocrnpyler_392656: complex_PTDVA_enzyme_VioC_biocrnpyler_392656 => PTDVA_biocrnpyler_392656 + enzyme_VioC_biocrnpyler_392656; r12_1_biocrnpyler_392656_k*complex_PTDVA_enzyme_VioC_biocrnpyler_392656;
    r12_1_biocrnpyler_392656_k = 10;
  r14_biocrnpyler_392656: complex_PTDVA_enzyme_VioC_biocrnpyler_392656 => DV_biocrnpyler_392656 + enzyme_VioC_biocrnpyler_392656; r14_biocrnpyler_392656_k*complex_PTDVA_enzyme_VioC_biocrnpyler_392656;
    r14_biocrnpyler_392656_k = 100;

  // Unit definitions:
  unit square_metre = metre^2;
  unit per_second = 1 / second;
  unit substance = dimensionless;
end
