// SBML level 3 version 2

model combined_model_of__combined_model_of__combined_model_of__external_reservoir_model_combined_model_of__atc_membrane2_combined_model_of__biocrnpyler_776499_combined_model_of__combined_model_of__external_reservoir_model_combined_model_of__atc_membrane3_combined_model_of__biocrnpyler_392656()
  // model units - substance: mole, time: second, volume: litre, area: square_metre, length: metre, extent: mole

  // Compartments:
  compartment fusedcell_external_combined = 0.0002 litre;
  compartment fusedcell_internal_combined = 1e-6 litre;

  // Species:
  species atc_i_cell2 in fusedcell_internal_combined = 9942.088;
  species ssDNA_comp1 in fusedcell_internal_combined = 10;
  species complex_protein_RNAase_transcript_vioA_biocrnpyler_776499 in fusedcell_internal_combined = 1.499686;
  species transcript_vioA_biocrnpyler_776499 in fusedcell_internal_combined = 119.5763;
  species enzyme_VioA_biocrnpyler_776499 in fusedcell_internal_combined = 1028.334;
  species complex_protein_Ribo_transcript_vioA_biocrnpyler_776499 in fusedcell_internal_combined = 5.99874;
  species complex_dna_dna_vioA_protein_RNAP_biocrnpyler_776499 in fusedcell_internal_combined = 0.7479688;
  species dna_dna_vioA_biocrnpyler_776499 in fusedcell_internal_combined = 9.252031;
  species complex_protein_Ribo_transcript_vioB_biocrnpyler_776499 in fusedcell_internal_combined = 5.99874;
  species complex_protein_RNAase_transcript_vioB_biocrnpyler_776499 in fusedcell_internal_combined = 1.499686;
  species transcript_vioB_biocrnpyler_776499 in fusedcell_internal_combined = 119.5763;
  species enzyme_VioB_biocrnpyler_776499 in fusedcell_internal_combined = 1028.334;
  species complex_dna_dna_vioB_protein_RNAP_biocrnpyler_776499 in fusedcell_internal_combined = 0.7479688;
  species dna_dna_vioB_biocrnpyler_776499 in fusedcell_internal_combined = 9.252031;
  species complex_protein_Ribo_transcript_vioE_biocrnpyler_776499 in fusedcell_internal_combined = 5.99874;
  species dna_dna_vioE_biocrnpyler_776499 in fusedcell_internal_combined = 9.252031;
  species transcript_vioE_biocrnpyler_776499 in fusedcell_internal_combined = 119.5763;
  species complex_dna_dna_vioE_protein_RNAP_biocrnpyler_776499 in fusedcell_internal_combined = 0.7479688;
  species enzyme_VioE_biocrnpyler_776499 in fusedcell_internal_combined = 1028.334;
  species complex_protein_RNAase_transcript_vioE_biocrnpyler_776499 in fusedcell_internal_combined = 1.499686;
  species transcript_vioD_biocrnpyler_776499 in fusedcell_internal_combined = 119.5763;
  species dna_dna_vioD_biocrnpyler_776499 in fusedcell_internal_combined = 9.252031;
  species complex_protein_Ribo_transcript_vioD_biocrnpyler_776499 in fusedcell_internal_combined = 5.99874;
  species enzyme_VioD_biocrnpyler_776499 in fusedcell_internal_combined = 1028.334;
  species complex_dna_dna_vioD_protein_RNAP_biocrnpyler_776499 in fusedcell_internal_combined = 0.7479688;
  species complex_protein_RNAase_transcript_vioD_biocrnpyler_776499 in fusedcell_internal_combined = 1.499686;
  species TRP_biocrnpyler_776499 in fusedcell_internal_combined = -7.665822e-86;
  species IPA_imine_biocrnpyler_776499 in fusedcell_internal_combined = -3.40204e-84;
  species complex_TRP_enzyme_VioA_biocrnpyler_776499 in fusedcell_internal_combined = 8.096007e-89;
  species IPA_imine_dimer_biocrnpyler_776499 in fusedcell_internal_combined = 1.62074e-82;
  species complex_2x_IPA_imine_enzyme_VioB_biocrnpyler_776499 in fusedcell_internal_combined = 8.262821e-89;
  species complex_IPA_imine_dimer_enzyme_VioE_biocrnpyler_776499 in fusedcell_internal_combined = -3.459822e-85;
  species complex_PTDVA_enzyme_VioD_biocrnpyler_776499 in fusedcell_internal_combined = -6.146878e-84;
  species atc_i_cell3 in fusedcell_internal_combined = 9942.088;
  species ssDNA_comp2 in fusedcell_internal_combined = 10;
  species enzyme_VioC_biocrnpyler_392656 in fusedcell_internal_combined = 4111.834;
  species protein_RNAP_biocrnpyler_776499_1_combined in fusedcell_internal_combined = 0.04221086;
  species protein_RNAase_biocrnpyler_776499_1_combined in fusedcell_internal_combined = 0.001270271;
  species transcript_vioC_biocrnpyler_392656 in fusedcell_internal_combined = 472.2874;
  species protein_Ribo_biocrnpyler_776499_1_combined in fusedcell_internal_combined = 0.005105973;
  species complex_protein_RNAase_transcript_vioC_biocrnpyler_392656 in fusedcell_internal_combined = 5.99873;
  species complex_protein_Ribo_transcript_vioC_biocrnpyler_392656 in fusedcell_internal_combined = 23.99489;
  species complex_dna_dna_vioC_protein_RNAP_biocrnpyler_392656 in fusedcell_internal_combined = 2.957789;
  species dna_dna_vioC_biocrnpyler_392656 in fusedcell_internal_combined = 7.042211;
  species PTVA_biocrnpyler_776499_1_combined in fusedcell_internal_combined = 0;
  species V_biocrnpyler_392656 in fusedcell_internal_combined = 0;
  species complex_PTVA_enzyme_VioC_biocrnpyler_392656 in fusedcell_internal_combined = 0;
  species PTDVA_biocrnpyler_776499_1_combined in fusedcell_internal_combined = 0;
  species DV_biocrnpyler_392656 in fusedcell_internal_combined = 0;
  species complex_PTDVA_enzyme_VioC_biocrnpyler_392656 in fusedcell_internal_combined = 0;
  species atc_e_external_reservoir_model_1_combined_1_combined in fusedcell_external = 57.91164;

  // Parameters:
  kb_combined = 0.002 per_second;
  kd_combined = 1e-5 per_second;

  // Reactions:
  r1_cell2: atc_e_external_reservoir_model_1_combined_1_combined -> atc_i_cell2; kb_combined*atc_e_external_reservoir_model_1_combined_1_combined - kd_combined*atc_i_cell2;
  r0_biocrnpyler_776499: dna_dna_vioA_biocrnpyler_776499 + protein_RNAP_biocrnpyler_776499_1_combined => complex_dna_dna_vioA_protein_RNAP_biocrnpyler_776499; r0_biocrnpyler_776499_k*dna_dna_vioA_biocrnpyler_776499*protein_RNAP_biocrnpyler_776499_1_combined;
    r0_biocrnpyler_776499_k = 100;
  r0_1_biocrnpyler_776499: complex_dna_dna_vioA_protein_RNAP_biocrnpyler_776499 => dna_dna_vioA_biocrnpyler_776499 + protein_RNAP_biocrnpyler_776499_1_combined; r0_1_biocrnpyler_776499_k*complex_dna_dna_vioA_protein_RNAP_biocrnpyler_776499;
    r0_1_biocrnpyler_776499_k = 10;
  r2_biocrnpyler_776499: complex_dna_dna_vioA_protein_RNAP_biocrnpyler_776499 => dna_dna_vioA_biocrnpyler_776499 + transcript_vioA_biocrnpyler_776499 + protein_RNAP_biocrnpyler_776499_1_combined; r2_biocrnpyler_776499_k*complex_dna_dna_vioA_protein_RNAP_biocrnpyler_776499;
    r2_biocrnpyler_776499_k = 0.05;
  r3_biocrnpyler_776499: transcript_vioA_biocrnpyler_776499 + protein_Ribo_biocrnpyler_776499_1_combined => complex_protein_Ribo_transcript_vioA_biocrnpyler_776499; r3_biocrnpyler_776499_k*transcript_vioA_biocrnpyler_776499*protein_Ribo_biocrnpyler_776499_1_combined;
    r3_biocrnpyler_776499_k = 100;
  r3_1_biocrnpyler_776499: complex_protein_Ribo_transcript_vioA_biocrnpyler_776499 => transcript_vioA_biocrnpyler_776499 + protein_Ribo_biocrnpyler_776499_1_combined; r3_1_biocrnpyler_776499_k*complex_protein_Ribo_transcript_vioA_biocrnpyler_776499;
    r3_1_biocrnpyler_776499_k = 10;
  r5_biocrnpyler_776499: complex_protein_Ribo_transcript_vioA_biocrnpyler_776499 => transcript_vioA_biocrnpyler_776499 + enzyme_VioA_biocrnpyler_776499 + protein_Ribo_biocrnpyler_776499_1_combined; r5_biocrnpyler_776499_k*complex_protein_Ribo_transcript_vioA_biocrnpyler_776499;
    r5_biocrnpyler_776499_k = 0.05;
  r6_biocrnpyler_776499: transcript_vioA_biocrnpyler_776499 + protein_RNAase_biocrnpyler_776499_1_combined => complex_protein_RNAase_transcript_vioA_biocrnpyler_776499; r6_biocrnpyler_776499_k*transcript_vioA_biocrnpyler_776499*protein_RNAase_biocrnpyler_776499_1_combined;
    r6_biocrnpyler_776499_k = 100;
  r6_1_biocrnpyler_776499: complex_protein_RNAase_transcript_vioA_biocrnpyler_776499 => transcript_vioA_biocrnpyler_776499 + protein_RNAase_biocrnpyler_776499_1_combined; r6_1_biocrnpyler_776499_k*complex_protein_RNAase_transcript_vioA_biocrnpyler_776499;
    r6_1_biocrnpyler_776499_k = 10;
  r8_biocrnpyler_776499: complex_protein_RNAase_transcript_vioA_biocrnpyler_776499 => protein_RNAase_biocrnpyler_776499_1_combined; r8_biocrnpyler_776499_k*complex_protein_RNAase_transcript_vioA_biocrnpyler_776499;
    r8_biocrnpyler_776499_k = 0.001;
  r9_biocrnpyler_776499: dna_dna_vioB_biocrnpyler_776499 + protein_RNAP_biocrnpyler_776499_1_combined => complex_dna_dna_vioB_protein_RNAP_biocrnpyler_776499; r9_biocrnpyler_776499_k*dna_dna_vioB_biocrnpyler_776499*protein_RNAP_biocrnpyler_776499_1_combined;
    r9_biocrnpyler_776499_k = 100;
  r9_1_biocrnpyler_776499: complex_dna_dna_vioB_protein_RNAP_biocrnpyler_776499 => dna_dna_vioB_biocrnpyler_776499 + protein_RNAP_biocrnpyler_776499_1_combined; r9_1_biocrnpyler_776499_k*complex_dna_dna_vioB_protein_RNAP_biocrnpyler_776499;
    r9_1_biocrnpyler_776499_k = 10;
  r11_biocrnpyler_776499: complex_dna_dna_vioB_protein_RNAP_biocrnpyler_776499 => dna_dna_vioB_biocrnpyler_776499 + transcript_vioB_biocrnpyler_776499 + protein_RNAP_biocrnpyler_776499_1_combined; r11_biocrnpyler_776499_k*complex_dna_dna_vioB_protein_RNAP_biocrnpyler_776499;
    r11_biocrnpyler_776499_k = 0.05;
  r12_biocrnpyler_776499: transcript_vioB_biocrnpyler_776499 + protein_Ribo_biocrnpyler_776499_1_combined => complex_protein_Ribo_transcript_vioB_biocrnpyler_776499; r12_biocrnpyler_776499_k*transcript_vioB_biocrnpyler_776499*protein_Ribo_biocrnpyler_776499_1_combined;
    r12_biocrnpyler_776499_k = 100;
  r12_1_biocrnpyler_776499: complex_protein_Ribo_transcript_vioB_biocrnpyler_776499 => transcript_vioB_biocrnpyler_776499 + protein_Ribo_biocrnpyler_776499_1_combined; r12_1_biocrnpyler_776499_k*complex_protein_Ribo_transcript_vioB_biocrnpyler_776499;
    r12_1_biocrnpyler_776499_k = 10;
  r14_biocrnpyler_776499: complex_protein_Ribo_transcript_vioB_biocrnpyler_776499 => transcript_vioB_biocrnpyler_776499 + enzyme_VioB_biocrnpyler_776499 + protein_Ribo_biocrnpyler_776499_1_combined; r14_biocrnpyler_776499_k*complex_protein_Ribo_transcript_vioB_biocrnpyler_776499;
    r14_biocrnpyler_776499_k = 0.05;
  r15_biocrnpyler_776499: transcript_vioB_biocrnpyler_776499 + protein_RNAase_biocrnpyler_776499_1_combined => complex_protein_RNAase_transcript_vioB_biocrnpyler_776499; r15_biocrnpyler_776499_k*transcript_vioB_biocrnpyler_776499*protein_RNAase_biocrnpyler_776499_1_combined;
    r15_biocrnpyler_776499_k = 100;
  r15_1_biocrnpyler_776499: complex_protein_RNAase_transcript_vioB_biocrnpyler_776499 => transcript_vioB_biocrnpyler_776499 + protein_RNAase_biocrnpyler_776499_1_combined; r15_1_biocrnpyler_776499_k*complex_protein_RNAase_transcript_vioB_biocrnpyler_776499;
    r15_1_biocrnpyler_776499_k = 10;
  r17_biocrnpyler_776499: complex_protein_RNAase_transcript_vioB_biocrnpyler_776499 => protein_RNAase_biocrnpyler_776499_1_combined; r17_biocrnpyler_776499_k*complex_protein_RNAase_transcript_vioB_biocrnpyler_776499;
    r17_biocrnpyler_776499_k = 0.001;
  r18_biocrnpyler_776499: dna_dna_vioE_biocrnpyler_776499 + protein_RNAP_biocrnpyler_776499_1_combined => complex_dna_dna_vioE_protein_RNAP_biocrnpyler_776499; r18_biocrnpyler_776499_k*dna_dna_vioE_biocrnpyler_776499*protein_RNAP_biocrnpyler_776499_1_combined;
    r18_biocrnpyler_776499_k = 100;
  r18_1_biocrnpyler_776499: complex_dna_dna_vioE_protein_RNAP_biocrnpyler_776499 => dna_dna_vioE_biocrnpyler_776499 + protein_RNAP_biocrnpyler_776499_1_combined; r18_1_biocrnpyler_776499_k*complex_dna_dna_vioE_protein_RNAP_biocrnpyler_776499;
    r18_1_biocrnpyler_776499_k = 10;
  r20_biocrnpyler_776499: complex_dna_dna_vioE_protein_RNAP_biocrnpyler_776499 => dna_dna_vioE_biocrnpyler_776499 + transcript_vioE_biocrnpyler_776499 + protein_RNAP_biocrnpyler_776499_1_combined; r20_biocrnpyler_776499_k*complex_dna_dna_vioE_protein_RNAP_biocrnpyler_776499;
    r20_biocrnpyler_776499_k = 0.05;
  r21_biocrnpyler_776499: transcript_vioE_biocrnpyler_776499 + protein_Ribo_biocrnpyler_776499_1_combined => complex_protein_Ribo_transcript_vioE_biocrnpyler_776499; r21_biocrnpyler_776499_k*transcript_vioE_biocrnpyler_776499*protein_Ribo_biocrnpyler_776499_1_combined;
    r21_biocrnpyler_776499_k = 100;
  r21_1_biocrnpyler_776499: complex_protein_Ribo_transcript_vioE_biocrnpyler_776499 => transcript_vioE_biocrnpyler_776499 + protein_Ribo_biocrnpyler_776499_1_combined; r21_1_biocrnpyler_776499_k*complex_protein_Ribo_transcript_vioE_biocrnpyler_776499;
    r21_1_biocrnpyler_776499_k = 10;
  r23_biocrnpyler_776499: complex_protein_Ribo_transcript_vioE_biocrnpyler_776499 => transcript_vioE_biocrnpyler_776499 + enzyme_VioE_biocrnpyler_776499 + protein_Ribo_biocrnpyler_776499_1_combined; r23_biocrnpyler_776499_k*complex_protein_Ribo_transcript_vioE_biocrnpyler_776499;
    r23_biocrnpyler_776499_k = 0.05;
  r24_biocrnpyler_776499: transcript_vioE_biocrnpyler_776499 + protein_RNAase_biocrnpyler_776499_1_combined => complex_protein_RNAase_transcript_vioE_biocrnpyler_776499; r24_biocrnpyler_776499_k*transcript_vioE_biocrnpyler_776499*protein_RNAase_biocrnpyler_776499_1_combined;
    r24_biocrnpyler_776499_k = 100;
  r24_1_biocrnpyler_776499: complex_protein_RNAase_transcript_vioE_biocrnpyler_776499 => transcript_vioE_biocrnpyler_776499 + protein_RNAase_biocrnpyler_776499_1_combined; r24_1_biocrnpyler_776499_k*complex_protein_RNAase_transcript_vioE_biocrnpyler_776499;
    r24_1_biocrnpyler_776499_k = 10;
  r26_biocrnpyler_776499: complex_protein_RNAase_transcript_vioE_biocrnpyler_776499 => protein_RNAase_biocrnpyler_776499_1_combined; r26_biocrnpyler_776499_k*complex_protein_RNAase_transcript_vioE_biocrnpyler_776499;
    r26_biocrnpyler_776499_k = 0.001;
  r27_biocrnpyler_776499: dna_dna_vioD_biocrnpyler_776499 + protein_RNAP_biocrnpyler_776499_1_combined => complex_dna_dna_vioD_protein_RNAP_biocrnpyler_776499; r27_biocrnpyler_776499_k*dna_dna_vioD_biocrnpyler_776499*protein_RNAP_biocrnpyler_776499_1_combined;
    r27_biocrnpyler_776499_k = 100;
  r27_1_biocrnpyler_776499: complex_dna_dna_vioD_protein_RNAP_biocrnpyler_776499 => dna_dna_vioD_biocrnpyler_776499 + protein_RNAP_biocrnpyler_776499_1_combined; r27_1_biocrnpyler_776499_k*complex_dna_dna_vioD_protein_RNAP_biocrnpyler_776499;
    r27_1_biocrnpyler_776499_k = 10;
  r29_biocrnpyler_776499: complex_dna_dna_vioD_protein_RNAP_biocrnpyler_776499 => dna_dna_vioD_biocrnpyler_776499 + transcript_vioD_biocrnpyler_776499 + protein_RNAP_biocrnpyler_776499_1_combined; r29_biocrnpyler_776499_k*complex_dna_dna_vioD_protein_RNAP_biocrnpyler_776499;
    r29_biocrnpyler_776499_k = 0.05;
  r30_biocrnpyler_776499: transcript_vioD_biocrnpyler_776499 + protein_Ribo_biocrnpyler_776499_1_combined => complex_protein_Ribo_transcript_vioD_biocrnpyler_776499; r30_biocrnpyler_776499_k*transcript_vioD_biocrnpyler_776499*protein_Ribo_biocrnpyler_776499_1_combined;
    r30_biocrnpyler_776499_k = 100;
  r30_1_biocrnpyler_776499: complex_protein_Ribo_transcript_vioD_biocrnpyler_776499 => transcript_vioD_biocrnpyler_776499 + protein_Ribo_biocrnpyler_776499_1_combined; r30_1_biocrnpyler_776499_k*complex_protein_Ribo_transcript_vioD_biocrnpyler_776499;
    r30_1_biocrnpyler_776499_k = 10;
  r32_biocrnpyler_776499: complex_protein_Ribo_transcript_vioD_biocrnpyler_776499 => transcript_vioD_biocrnpyler_776499 + enzyme_VioD_biocrnpyler_776499 + protein_Ribo_biocrnpyler_776499_1_combined; r32_biocrnpyler_776499_k*complex_protein_Ribo_transcript_vioD_biocrnpyler_776499;
    r32_biocrnpyler_776499_k = 0.05;
  r33_biocrnpyler_776499: transcript_vioD_biocrnpyler_776499 + protein_RNAase_biocrnpyler_776499_1_combined => complex_protein_RNAase_transcript_vioD_biocrnpyler_776499; r33_biocrnpyler_776499_k*transcript_vioD_biocrnpyler_776499*protein_RNAase_biocrnpyler_776499_1_combined;
    r33_biocrnpyler_776499_k = 100;
  r33_1_biocrnpyler_776499: complex_protein_RNAase_transcript_vioD_biocrnpyler_776499 => transcript_vioD_biocrnpyler_776499 + protein_RNAase_biocrnpyler_776499_1_combined; r33_1_biocrnpyler_776499_k*complex_protein_RNAase_transcript_vioD_biocrnpyler_776499;
    r33_1_biocrnpyler_776499_k = 10;
  r35_biocrnpyler_776499: complex_protein_RNAase_transcript_vioD_biocrnpyler_776499 => protein_RNAase_biocrnpyler_776499_1_combined; r35_biocrnpyler_776499_k*complex_protein_RNAase_transcript_vioD_biocrnpyler_776499;
    r35_biocrnpyler_776499_k = 0.001;
  r36_biocrnpyler_776499: TRP_biocrnpyler_776499 + enzyme_VioA_biocrnpyler_776499 => complex_TRP_enzyme_VioA_biocrnpyler_776499; r36_biocrnpyler_776499_k*TRP_biocrnpyler_776499*enzyme_VioA_biocrnpyler_776499;
    r36_biocrnpyler_776499_k = 10;
  r36_1_biocrnpyler_776499: complex_TRP_enzyme_VioA_biocrnpyler_776499 => TRP_biocrnpyler_776499 + enzyme_VioA_biocrnpyler_776499; r36_1_biocrnpyler_776499_k*complex_TRP_enzyme_VioA_biocrnpyler_776499;
    r36_1_biocrnpyler_776499_k = 1;
  r38_biocrnpyler_776499: complex_TRP_enzyme_VioA_biocrnpyler_776499 => IPA_imine_biocrnpyler_776499 + enzyme_VioA_biocrnpyler_776499; r38_biocrnpyler_776499_k*complex_TRP_enzyme_VioA_biocrnpyler_776499;
    r38_biocrnpyler_776499_k = 203;
  r39_biocrnpyler_776499: 2 IPA_imine_biocrnpyler_776499 + enzyme_VioB_biocrnpyler_776499 => complex_2x_IPA_imine_enzyme_VioB_biocrnpyler_776499; r39_biocrnpyler_776499_k*IPA_imine_biocrnpyler_776499^2*enzyme_VioB_biocrnpyler_776499;
    r39_biocrnpyler_776499_k = 10;
  r39_1_biocrnpyler_776499: complex_2x_IPA_imine_enzyme_VioB_biocrnpyler_776499 => 2 IPA_imine_biocrnpyler_776499 + enzyme_VioB_biocrnpyler_776499; r39_1_biocrnpyler_776499_k*complex_2x_IPA_imine_enzyme_VioB_biocrnpyler_776499;
    r39_1_biocrnpyler_776499_k = 1;
  r41_biocrnpyler_776499: complex_2x_IPA_imine_enzyme_VioB_biocrnpyler_776499 => IPA_imine_dimer_biocrnpyler_776499 + enzyme_VioB_biocrnpyler_776499; r41_biocrnpyler_776499_k*complex_2x_IPA_imine_enzyme_VioB_biocrnpyler_776499;
    r41_biocrnpyler_776499_k = 4500;
  r42_biocrnpyler_776499: IPA_imine_dimer_biocrnpyler_776499 + enzyme_VioE_biocrnpyler_776499 => complex_IPA_imine_dimer_enzyme_VioE_biocrnpyler_776499; r42_biocrnpyler_776499_k*IPA_imine_dimer_biocrnpyler_776499*enzyme_VioE_biocrnpyler_776499;
    r42_biocrnpyler_776499_k = 100;
  r42_1_biocrnpyler_776499: complex_IPA_imine_dimer_enzyme_VioE_biocrnpyler_776499 => IPA_imine_dimer_biocrnpyler_776499 + enzyme_VioE_biocrnpyler_776499; r42_1_biocrnpyler_776499_k*complex_IPA_imine_dimer_enzyme_VioE_biocrnpyler_776499;
    r42_1_biocrnpyler_776499_k = 10;
  r44_biocrnpyler_776499: complex_IPA_imine_dimer_enzyme_VioE_biocrnpyler_776499 => PTDVA_biocrnpyler_776499_1_combined + enzyme_VioE_biocrnpyler_776499; r44_biocrnpyler_776499_k*complex_IPA_imine_dimer_enzyme_VioE_biocrnpyler_776499;
    r44_biocrnpyler_776499_k = 100;
  r45_biocrnpyler_776499: PTDVA_biocrnpyler_776499_1_combined + enzyme_VioD_biocrnpyler_776499 => complex_PTDVA_enzyme_VioD_biocrnpyler_776499; r45_biocrnpyler_776499_k*PTDVA_biocrnpyler_776499_1_combined*enzyme_VioD_biocrnpyler_776499;
    r45_biocrnpyler_776499_k = 100;
  r45_1_biocrnpyler_776499: complex_PTDVA_enzyme_VioD_biocrnpyler_776499 => PTDVA_biocrnpyler_776499_1_combined + enzyme_VioD_biocrnpyler_776499; r45_1_biocrnpyler_776499_k*complex_PTDVA_enzyme_VioD_biocrnpyler_776499;
    r45_1_biocrnpyler_776499_k = 10;
  r47_biocrnpyler_776499: complex_PTDVA_enzyme_VioD_biocrnpyler_776499 => PTVA_biocrnpyler_776499_1_combined + enzyme_VioD_biocrnpyler_776499; r47_biocrnpyler_776499_k*complex_PTDVA_enzyme_VioD_biocrnpyler_776499;
    r47_biocrnpyler_776499_k = 100;
  r1_cell3: atc_e_external_reservoir_model_1_combined_1_combined -> atc_i_cell3; kb_combined*atc_e_external_reservoir_model_1_combined_1_combined - kd_combined*atc_i_cell3;
  r0_biocrnpyler_392656: dna_dna_vioC_biocrnpyler_392656 + protein_RNAP_biocrnpyler_776499_1_combined => complex_dna_dna_vioC_protein_RNAP_biocrnpyler_392656; r0_biocrnpyler_392656_k*dna_dna_vioC_biocrnpyler_392656*protein_RNAP_biocrnpyler_776499_1_combined;
    r0_biocrnpyler_392656_k = 100;
  r0_1_biocrnpyler_392656: complex_dna_dna_vioC_protein_RNAP_biocrnpyler_392656 => dna_dna_vioC_biocrnpyler_392656 + protein_RNAP_biocrnpyler_776499_1_combined; r0_1_biocrnpyler_392656_k*complex_dna_dna_vioC_protein_RNAP_biocrnpyler_392656;
    r0_1_biocrnpyler_392656_k = 10;
  r2_biocrnpyler_392656: complex_dna_dna_vioC_protein_RNAP_biocrnpyler_392656 => dna_dna_vioC_biocrnpyler_392656 + transcript_vioC_biocrnpyler_392656 + protein_RNAP_biocrnpyler_776499_1_combined; r2_biocrnpyler_392656_k*complex_dna_dna_vioC_protein_RNAP_biocrnpyler_392656;
    r2_biocrnpyler_392656_k = 0.05;
  r3_biocrnpyler_392656: transcript_vioC_biocrnpyler_392656 + protein_Ribo_biocrnpyler_776499_1_combined => complex_protein_Ribo_transcript_vioC_biocrnpyler_392656; r3_biocrnpyler_392656_k*transcript_vioC_biocrnpyler_392656*protein_Ribo_biocrnpyler_776499_1_combined;
    r3_biocrnpyler_392656_k = 100;
  r3_1_biocrnpyler_392656: complex_protein_Ribo_transcript_vioC_biocrnpyler_392656 => transcript_vioC_biocrnpyler_392656 + protein_Ribo_biocrnpyler_776499_1_combined; r3_1_biocrnpyler_392656_k*complex_protein_Ribo_transcript_vioC_biocrnpyler_392656;
    r3_1_biocrnpyler_392656_k = 10;
  r5_biocrnpyler_392656: complex_protein_Ribo_transcript_vioC_biocrnpyler_392656 => transcript_vioC_biocrnpyler_392656 + enzyme_VioC_biocrnpyler_392656 + protein_Ribo_biocrnpyler_776499_1_combined; r5_biocrnpyler_392656_k*complex_protein_Ribo_transcript_vioC_biocrnpyler_392656;
    r5_biocrnpyler_392656_k = 0.05;
  r6_biocrnpyler_392656: transcript_vioC_biocrnpyler_392656 + protein_RNAase_biocrnpyler_776499_1_combined => complex_protein_RNAase_transcript_vioC_biocrnpyler_392656; r6_biocrnpyler_392656_k*transcript_vioC_biocrnpyler_392656*protein_RNAase_biocrnpyler_776499_1_combined;
    r6_biocrnpyler_392656_k = 100;
  r6_1_biocrnpyler_392656: complex_protein_RNAase_transcript_vioC_biocrnpyler_392656 => transcript_vioC_biocrnpyler_392656 + protein_RNAase_biocrnpyler_776499_1_combined; r6_1_biocrnpyler_392656_k*complex_protein_RNAase_transcript_vioC_biocrnpyler_392656;
    r6_1_biocrnpyler_392656_k = 10;
  r8_biocrnpyler_392656: complex_protein_RNAase_transcript_vioC_biocrnpyler_392656 => protein_RNAase_biocrnpyler_776499_1_combined; r8_biocrnpyler_392656_k*complex_protein_RNAase_transcript_vioC_biocrnpyler_392656;
    r8_biocrnpyler_392656_k = 0.001;
  r9_biocrnpyler_392656: PTVA_biocrnpyler_776499_1_combined + enzyme_VioC_biocrnpyler_392656 => complex_PTVA_enzyme_VioC_biocrnpyler_392656; r9_biocrnpyler_392656_k*PTVA_biocrnpyler_776499_1_combined*enzyme_VioC_biocrnpyler_392656;
    r9_biocrnpyler_392656_k = 100;
  r9_1_biocrnpyler_392656: complex_PTVA_enzyme_VioC_biocrnpyler_392656 => PTVA_biocrnpyler_776499_1_combined + enzyme_VioC_biocrnpyler_392656; r9_1_biocrnpyler_392656_k*complex_PTVA_enzyme_VioC_biocrnpyler_392656;
    r9_1_biocrnpyler_392656_k = 10;
  r11_biocrnpyler_392656: complex_PTVA_enzyme_VioC_biocrnpyler_392656 => V_biocrnpyler_392656 + enzyme_VioC_biocrnpyler_392656; r11_biocrnpyler_392656_k*complex_PTVA_enzyme_VioC_biocrnpyler_392656;
    r11_biocrnpyler_392656_k = 100;
  r12_biocrnpyler_392656: PTDVA_biocrnpyler_776499_1_combined + enzyme_VioC_biocrnpyler_392656 => complex_PTDVA_enzyme_VioC_biocrnpyler_392656; r12_biocrnpyler_392656_k*PTDVA_biocrnpyler_776499_1_combined*enzyme_VioC_biocrnpyler_392656;
    r12_biocrnpyler_392656_k = 100;
  r12_1_biocrnpyler_392656: complex_PTDVA_enzyme_VioC_biocrnpyler_392656 => PTDVA_biocrnpyler_776499_1_combined + enzyme_VioC_biocrnpyler_392656; r12_1_biocrnpyler_392656_k*complex_PTDVA_enzyme_VioC_biocrnpyler_392656;
    r12_1_biocrnpyler_392656_k = 10;
  r14_biocrnpyler_392656: complex_PTDVA_enzyme_VioC_biocrnpyler_392656 => DV_biocrnpyler_392656 + enzyme_VioC_biocrnpyler_392656; r14_biocrnpyler_392656_k*complex_PTDVA_enzyme_VioC_biocrnpyler_392656;
    r14_biocrnpyler_392656_k = 100;

  // Unit definitions:
  unit square_metre = metre^2;
  unit per_second = 1 / second;
  unit substance = dimensionless;
end
