// SBML level 3 version 2

model combined_model_of__combined_model_of__external_reservoir_model_combined_model_of__combined_model_of__biocrnpyler_151102()
  // model units - substance: mole, time: second, volume: litre, area: square_metre, length: metre, extent: mole

  // Compartments:
  compartment cellfusedexternal = 1e-6 litre;
  compartment cellfusedinternal = 0;

  // Species:
  species atc_e_external_reservoir_model in cellfusedexternal = 10000/cellfusedexternal;
  species dna_f_biocrnpyler_151102 in cellfusedinternal = 1/cellfusedinternal;
  species tetR_biocrnpyler_151102 in cellfusedinternal = 10/cellfusedinternal;
  species rna_f_biocrnpyler_151102 in cellfusedinternal = 0;
  species exsA_biocrnpyler_151102 in cellfusedinternal = 0;
  species ATP_biocrnpyler_151102 in cellfusedinternal = 20/cellfusedinternal;
  species ADP_biocrnpyler_151102 in cellfusedinternal = 0;
  species atc_i_biocrnpyler_151102 in cellfusedinternal = 0;
  species complex_atc_i_tetR_biocrnpyler_151102 in cellfusedinternal = 0;
  species complex_dna_f_tetR_biocrnpyler_151102 in cellfusedinternal = 0;
  species complex_atc_i_dna_f_tetR_biocrnpyler_151102 in cellfusedinternal = 0;
  species P_biocrnpyler_151102 in cellfusedinternal = 0;

  // Reactions:
  r0_biocrnpyler_151102: atc_i_biocrnpyler_151102 + tetR_biocrnpyler_151102 => complex_atc_i_tetR_biocrnpyler_151102; r0_biocrnpyler_151102_k*atc_i_biocrnpyler_151102*tetR_biocrnpyler_151102;
    r0_biocrnpyler_151102_k = 2e-5;
  r0_1_biocrnpyler_151102: complex_atc_i_tetR_biocrnpyler_151102 => atc_i_biocrnpyler_151102 + tetR_biocrnpyler_151102; r0_1_biocrnpyler_151102_k*complex_atc_i_tetR_biocrnpyler_151102;
    r0_1_biocrnpyler_151102_k = 2e-9;
  r2_biocrnpyler_151102: dna_f_biocrnpyler_151102 + tetR_biocrnpyler_151102 => complex_dna_f_tetR_biocrnpyler_151102; r2_biocrnpyler_151102_k*dna_f_biocrnpyler_151102*tetR_biocrnpyler_151102;
    r2_biocrnpyler_151102_k = 4e-7;
  r2_1_biocrnpyler_151102: complex_dna_f_tetR_biocrnpyler_151102 => dna_f_biocrnpyler_151102 + tetR_biocrnpyler_151102; r2_1_biocrnpyler_151102_k*complex_dna_f_tetR_biocrnpyler_151102;
    r2_1_biocrnpyler_151102_k = 1e-12;
  r4_biocrnpyler_151102: complex_dna_f_tetR_biocrnpyler_151102 + atc_i_biocrnpyler_151102 => complex_atc_i_dna_f_tetR_biocrnpyler_151102; r4_biocrnpyler_151102_k*complex_dna_f_tetR_biocrnpyler_151102*atc_i_biocrnpyler_151102;
    r4_biocrnpyler_151102_k = 6e-8;
  r4_1_biocrnpyler_151102: complex_atc_i_dna_f_tetR_biocrnpyler_151102 => complex_dna_f_tetR_biocrnpyler_151102 + atc_i_biocrnpyler_151102; r4_1_biocrnpyler_151102_k*complex_atc_i_dna_f_tetR_biocrnpyler_151102;
    r4_1_biocrnpyler_151102_k = 3e-9;
  r6_biocrnpyler_151102: complex_atc_i_dna_f_tetR_biocrnpyler_151102 => dna_f_biocrnpyler_151102 + complex_atc_i_tetR_biocrnpyler_151102; r6_biocrnpyler_151102_k*complex_atc_i_dna_f_tetR_biocrnpyler_151102;
    r6_biocrnpyler_151102_k = 5e-5;
  r6_1_biocrnpyler_151102: dna_f_biocrnpyler_151102 + complex_atc_i_tetR_biocrnpyler_151102 => complex_atc_i_dna_f_tetR_biocrnpyler_151102; r6_1_biocrnpyler_151102_k*dna_f_biocrnpyler_151102*complex_atc_i_tetR_biocrnpyler_151102;
    r6_1_biocrnpyler_151102_k = 1e-10;
  r8_biocrnpyler_151102: dna_f_biocrnpyler_151102 => dna_f_biocrnpyler_151102 + rna_f_biocrnpyler_151102; r8_biocrnpyler_151102_k*dna_f_biocrnpyler_151102;
    r8_biocrnpyler_151102_k = 0.001875;
  r9_biocrnpyler_151102: rna_f_biocrnpyler_151102 + ATP_biocrnpyler_151102 => rna_f_biocrnpyler_151102 + ADP_biocrnpyler_151102 + exsA_biocrnpyler_151102 + P_biocrnpyler_151102; r9_biocrnpyler_151102_k*rna_f_biocrnpyler_151102*ATP_biocrnpyler_151102^n/(ATP_biocrnpyler_151102^n + K);
    r9_biocrnpyler_151102_k = 0.0007; n = 1; K = 1;
  r10_biocrnpyler_151102: rna_f_biocrnpyler_151102 => ; r10_biocrnpyler_151102_k*rna_f_biocrnpyler_151102;
    r10_biocrnpyler_151102_k = 0.001;

  // Unit definitions:
  unit square_metre = metre^2;
  unit per_second = 1 / second;
  unit substance = dimensionless;
end
