// SBML level 3 version 2

model combined_model_of__combined_model_of__combined_model_of__external_reservoir_model_combined_model_of__atc_membrane_combined_model_of__biocrnpyler_652128_combined_model_of__combined_model_of__external_reservoir_model_combined_model_of__atc_membrane_combined_model_of__biocrnpyler_942793()
  // model units - substance: mole, time: second, volume: litre, area: square_metre, length: metre, extent: mole

  // Compartments:
  compartment cellfusedexternal_combined = 4e-6 litre;
  compartment cellfusedinternal_combined = 1e-6 litre;

  // Species:
  species dna_f_biocrnpyler_652128 in cellfusedinternal_combined = 1/cellfusedinternal_combined;
  species tetR_biocrnpyler_652128 in cellfusedinternal_combined = 10/cellfusedinternal_combined;
  species rna_f_biocrnpyler_652128 in cellfusedinternal_combined = 0;
  species atc_i_1_combined in cellfusedinternal_combined = 0;
  species complex_atc_i_tetR_biocrnpyler_652128 in cellfusedinternal_combined = 0;
  species complex_dna_f_tetR_biocrnpyler_652128 in cellfusedinternal_combined = 0;
  species complex_atc_i_dna_f_tetR_biocrnpyler_652128 in cellfusedinternal_combined = 0;
  species atc_i in cellfusedinternal_combined = 0;
  species dna_h_biocrnpyler_942793 in cellfusedinternal_combined = 1/cellfusedinternal_combined;
  species rna_h_biocrnpyler_942793 in cellfusedinternal_combined = 0;
  species exsA_biocrnpyler_652128_1_combined in cellfusedinternal_combined = 0;
  species ATP_biocrnpyler_652128_1_combined in cellfusedinternal_combined = 20/cellfusedinternal_combined;
  species ADP_biocrnpyler_652128_1_combined in cellfusedinternal_combined = 0;
  species P_biocrnpyler_652128_1_combined in cellfusedinternal_combined = 0;
  species complex_dna_h_exsA_biocrnpyler_942793 in cellfusedinternal_combined = 0;
  species gfp_biocrnpyler_942793 in cellfusedinternal_combined = 0;
  species atc_e_external_reservoir_model_1_combined_1_combined in cellfusedexternal = 10000/cellfusedexternal;

  // Parameters:
  kb_combined = 0.002 per_second;
  kd_combined = 1e-5 per_second;

  // Reactions:
  r0_biocrnpyler_652128: atc_i_1_combined + tetR_biocrnpyler_652128 => complex_atc_i_tetR_biocrnpyler_652128; r0_biocrnpyler_652128_k*atc_i_1_combined*tetR_biocrnpyler_652128;
    r0_biocrnpyler_652128_k = 2e-5;
  r0_1_biocrnpyler_652128: complex_atc_i_tetR_biocrnpyler_652128 => atc_i_1_combined + tetR_biocrnpyler_652128; r0_1_biocrnpyler_652128_k*complex_atc_i_tetR_biocrnpyler_652128;
    r0_1_biocrnpyler_652128_k = 2e-9;
  r2_biocrnpyler_652128: dna_f_biocrnpyler_652128 + tetR_biocrnpyler_652128 => complex_dna_f_tetR_biocrnpyler_652128; r2_biocrnpyler_652128_k*dna_f_biocrnpyler_652128*tetR_biocrnpyler_652128;
    r2_biocrnpyler_652128_k = 4e-7;
  r2_1_biocrnpyler_652128: complex_dna_f_tetR_biocrnpyler_652128 => dna_f_biocrnpyler_652128 + tetR_biocrnpyler_652128; r2_1_biocrnpyler_652128_k*complex_dna_f_tetR_biocrnpyler_652128;
    r2_1_biocrnpyler_652128_k = 1e-12;
  r4_biocrnpyler_652128: complex_dna_f_tetR_biocrnpyler_652128 + atc_i_1_combined => complex_atc_i_dna_f_tetR_biocrnpyler_652128; r4_biocrnpyler_652128_k*complex_dna_f_tetR_biocrnpyler_652128*atc_i_1_combined;
    r4_biocrnpyler_652128_k = 6e-8;
  r4_1_biocrnpyler_652128: complex_atc_i_dna_f_tetR_biocrnpyler_652128 => complex_dna_f_tetR_biocrnpyler_652128 + atc_i_1_combined; r4_1_biocrnpyler_652128_k*complex_atc_i_dna_f_tetR_biocrnpyler_652128;
    r4_1_biocrnpyler_652128_k = 3e-9;
  r6_biocrnpyler_652128: complex_atc_i_dna_f_tetR_biocrnpyler_652128 => dna_f_biocrnpyler_652128 + complex_atc_i_tetR_biocrnpyler_652128; r6_biocrnpyler_652128_k*complex_atc_i_dna_f_tetR_biocrnpyler_652128;
    r6_biocrnpyler_652128_k = 5e-5;
  r6_1_biocrnpyler_652128: dna_f_biocrnpyler_652128 + complex_atc_i_tetR_biocrnpyler_652128 => complex_atc_i_dna_f_tetR_biocrnpyler_652128; r6_1_biocrnpyler_652128_k*dna_f_biocrnpyler_652128*complex_atc_i_tetR_biocrnpyler_652128;
    r6_1_biocrnpyler_652128_k = 1e-10;
  r8_biocrnpyler_652128: dna_f_biocrnpyler_652128 => dna_f_biocrnpyler_652128 + rna_f_biocrnpyler_652128; r8_biocrnpyler_652128_k*dna_f_biocrnpyler_652128;
    r8_biocrnpyler_652128_k = 0.001875;
  r9_biocrnpyler_652128: rna_f_biocrnpyler_652128 + ATP_biocrnpyler_652128_1_combined => rna_f_biocrnpyler_652128 + ADP_biocrnpyler_652128_1_combined + exsA_biocrnpyler_652128_1_combined + P_biocrnpyler_652128_1_combined; r9_biocrnpyler_652128_k*rna_f_biocrnpyler_652128*ATP_biocrnpyler_652128_1_combined^r9_biocrnpyler_652128_n/(ATP_biocrnpyler_652128_1_combined^r9_biocrnpyler_652128_n + r9_biocrnpyler_652128_K);
    r9_biocrnpyler_652128_k = 0.0007; r9_biocrnpyler_652128_n = 1; r9_biocrnpyler_652128_K = 1;
  r10_biocrnpyler_652128: rna_f_biocrnpyler_652128 => ; r10_biocrnpyler_652128_k*rna_f_biocrnpyler_652128;
    r10_biocrnpyler_652128_k = 0.001;
  r0_biocrnpyler_942793: dna_h_biocrnpyler_942793 + exsA_biocrnpyler_652128_1_combined => complex_dna_h_exsA_biocrnpyler_942793; r0_biocrnpyler_942793_k*dna_h_biocrnpyler_942793*exsA_biocrnpyler_652128_1_combined;
    r0_biocrnpyler_942793_k = 4e-5;
  r0_1_biocrnpyler_942793: complex_dna_h_exsA_biocrnpyler_942793 => dna_h_biocrnpyler_942793 + exsA_biocrnpyler_652128_1_combined; r0_1_biocrnpyler_942793_k*complex_dna_h_exsA_biocrnpyler_942793;
    r0_1_biocrnpyler_942793_k = 1e-12;
  r2_biocrnpyler_942793: complex_dna_h_exsA_biocrnpyler_942793 => complex_dna_h_exsA_biocrnpyler_942793 + rna_h_biocrnpyler_942793; r2_biocrnpyler_942793_k*complex_dna_h_exsA_biocrnpyler_942793;
    r2_biocrnpyler_942793_k = 0.001875;
  r3_biocrnpyler_942793: rna_h_biocrnpyler_942793 + ATP_biocrnpyler_652128_1_combined => rna_h_biocrnpyler_942793 + ADP_biocrnpyler_652128_1_combined + gfp_biocrnpyler_942793 + P_biocrnpyler_652128_1_combined; r3_biocrnpyler_942793_k*rna_h_biocrnpyler_942793*ATP_biocrnpyler_652128_1_combined^r3_biocrnpyler_942793_n/(ATP_biocrnpyler_652128_1_combined^r3_biocrnpyler_942793_n + r3_biocrnpyler_942793_K);
    r3_biocrnpyler_942793_k = 0.0007; r3_biocrnpyler_942793_n = 1; r3_biocrnpyler_942793_K = 1;
  r4_biocrnpyler_942793: rna_h_biocrnpyler_942793 => ; r4_biocrnpyler_942793_k*rna_h_biocrnpyler_942793;
    r4_biocrnpyler_942793_k = 0.001;

  // Unit definitions:
  unit square_metre = metre^2;
  unit per_second = 1 / second;
  unit substance = dimensionless;
end
